<neuroml xmlns="http://www.neuroml.org/schema/neuroml2" id="ThreeCellChain">

    <include href="glif_cell_types.nml"/>

    <GLIF1Cell id="chainCell" C="100pF" gL="10nS" EL="-70mV" vreset="-70mV"
               t_ref="5ms" vth="-50mV"/>

    <alphaCurrentSynapse id="chainSynapse" tau="5ms" ibase="600pA"/>

    <spikeArray id="inputTrain">
        <spike id="0" time="20ms"/>
        <spike id="1" time="70ms"/>
        <spike id="2" time="120ms"/>
        <spike id="3" time="170ms"/>
        <spike id="4" time="220ms"/>
        <spike id="5" time="270ms"/>
        <spike id="6" time="320ms"/>
        <spike id="7" time="370ms"/>
        <spike id="8" time="420ms"/>
        <spike id="9" time="470ms"/>
    </spikeArray>

    <network id="chainNetwork">
        <population id="chain" component="chainCell" size="3"/>

        <inputList id="driveA" component="inputTrain" population="chain">
            <input id="0" target="../chain[0]" destination="synapses"/>
        </inputList>
    </network>

</neuroml>
